################################################################################
# brief: DEM script for CFD-DEM simulations of periodic box                    #
# *Randomly packing particles in the domain*                                   #
# Cf. Esgandari et al. (2024), Discrete magnification lens model:              #
# A new hybrid multi-scale modelling method for fluid-particle systems,        #
# pow. tech.                                                                   #
#                                                                              #
# authors: Behrad Esgandari                                                    #
# date: Jan 2025                                                               #
# copyright: 2025- JKU Linz                                                    #
################################################################################

log             ../DEM/log.liggghts
thermo_log      ../DEM/post/thermo.txt

# define the attributes associated with the particles,
# 'granular' (or 'sphere') style uses diameter, mass and angular velocity
atom_style      granular

# use an array to map particle IDs to local storage index,
atom_modify     map array

# set simulation domain to be fixed in x y z
boundary        p p p

# save communication by turning off Newton's 3rd law for pairwise interaction,
# note: this setting only influences communication between procs, Newton's
# 3rd law is still used for contact force calculations
newton          off

# use a single value for ghost particle cutoff distance and
# enable velocity to be communicated with ghost particles
communicate     single vel yes

# set unit system to SI
units           si

region          domain block -0.004 0.004 -0.004 0.004 -0.016 0.016 units box
# specify domain decomposition for parallel execution
processors      4 2 4

# read the restart file
read_restart    ../DEM/post/restart/liggghts.restart

# specify the skin distance for neighbor list generation
neighbor        0.000075 bin
neigh_modify every 5 delay 0 check no

# define the material properties required for granular pair styles
# type 1 = particles with friction
fix m1 all property/global youngsModulus peratomtype 1e6
fix m2 all property/global poissonsRatio peratomtype 0.42
fix m3 all property/global coefficientRestitution peratomtypepair 1 0.9
fix m4 all property/global coefficientFriction peratomtypepair 1 0.1

# specify contact model to use
pair_style  gran model hertz tangential history limitForce on
pair_coeff  * *

# set the time step
timestep    0.000001

# apply gravity
fix gravity all gravity 9.81 vector 0.0 0.0 -1.0


# set up coupling to CFD simulation
fix cfd  all couple/cfd couple_every 50 one2one
fix cfd2 all couple/cfd/force/implicit

# use constant NVE integration to update position, velocity and angular velocity
fix         integr all nve/sphere

# output settings, include kinetic energy
thermo_style    custom step atoms ke

# set frequency of output
thermo          1000

# ignore particles leaving the simulation domain,
# do not normalize thermodynamic output values by the number of atoms
thermo_modify   lost ignore norm no
compute_modify  thermo_temp dynamic yes

# output particle properties (same frequency as CFD output)
dump dmp all custom/vtk 5000 ../DEM/post/liggghts_run_*.vtk id type x y z vx vy vz &
     fx fy fz omegax omegay omegaz radius

# run 1 time step to initialize all DEM systems
run 1
